OpenVSP model (file version 5), 3 components.
Geometry view with OpenVSP parameter names; values to 6 digits, angles in degrees, lengths in the model's unit.
Overall bounding box: X_Min=-0.000376552 X_Len=0.863116 Y_Min=-2.01022 Y_Len=4.02044 Z_Min=-0.05 Z_Len=0.116536

Wing "WingGeom"
  location (X Y Z) 0 0 0, rotation 0 0 0
  symmetric about XZ
  bounding box size 0.863116 4.02044 0.0848375
  mass: Density=0 Shell_Flag=0 Mass_Area=0 Mass_Prior=1 PointMass=0.4484 CGx=0.143279 CGy=0 CGz=0.005251 Ixx=0.274489 Iyy=0.0051396 Izz=0.279427 Ixy=0 Ixz=-0.000109 Iyz=0
  totals: TotalSpan=4 TotalProjectedSpan=4 TotalChord=0.362 TotalArea=1.117 TotalAR=14.3241 MAC=0.329318
  root: chord 0.57, twist 0, NACA 4-series Camber=0.0568929 CamberLoc=0.38 ThickChord=0.121429
  sections:
    n  Span  Root_Chord  Tip_Chord  Area     Sweep  Sweep_Location  Dihedral  Twist  Twist_Location  tip airfoil
    1  0.15  0.57        0.5        0.08025  14.93  0               0         0      0               as above
    2  0.15  0.5         0.43       0.06975  20     0               0         0      0.25            NACA 4-series Camber=0.02 CamberLoc=0.38 ThickChord=0.121429
    3  0.3   0.43        0.32       0.1125   20     0               0         0      0.25            as above
    4  0.6   0.32        0.2        0.156    20     0               0         -1.5   0.25            NACA 4-series Camber=0 CamberLoc=0.38 ThickChord=0.12
    5  0.8   0.2         0.15       0.14     20     0               0         -3     0.25            airfoil file "Self stable 1"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 BaseThickChord=0.144108 ThickChord=0.144108
  SS_Control "Flaps": EtaStart=0.15 EtaEnd=0.3 Length_C_Start=0.3 Length_C_End=0.3 Length_Start=0.129 Length_End=0.096 LE_Flag=0 Surf_Type=2
  SS_Control "Alierons": EtaStart=0.3 EtaEnd=0.6 Length_C_Start=0.3 Length_C_End=0.3 Length_Start=0.096 Length_End=0.06 LE_Flag=0 Surf_Type=2

Ellipsoid "EllipsoidGeom", child of "WingGeom"
  location (X Y Z) 0.1 0 0, rotation 0 0 0
  bounding box size 0.1 0.1 0.1
  mass: Density=0 Shell_Flag=0 Mass_Area=0 Mass_Prior=0 PointMass=1 CGx=0 CGy=0 CGz=0 Ixx=0 Iyy=0 Izz=0 Ixy=0 Ixz=0 Iyz=0
  Design: A_Radius=0.05 B_Radius=0.05 C_Radius=0.05

NGonMesh "MeshGeom_NGon"
  location (X Y Z) 0 0 0, rotation 0 0 0

VSPAERO settings (reference component "WingGeom"): Sref=1.117 bref=4 cref=0.362 Xcg=0.120462 Ycg=0 Zcg=0.00248265 AlphaStart=-20 AlphaEnd=20 AlphaNpts=40 BetaStart=0 BetaEnd=0 BetaNpts=1 MachStart=0 MachEnd=0 MachNpts=1 ReCref=1e+07 Vinf=100 Rho=0.002377
